*Heading
** Job name: inc-test Model name: RUC-inc-method
** Generated by: Abaqus/CAE 6.14-1
*Preprint, echo=NO, model=NO, history=NO, contact=NO
**
** PARTS
**
*Part, name=PART-1
*Node
   3912,   2.51476741,   1.14630187,     3.716223
   3913,   2.53589225,   1.14630282,   3.71622276
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*Element, type=C3D8
 236,  3941,  3950,  3943,  3942,  4231,  4234,  4233,  4232
 237,  4231,  4234,  4233,  4232,  4235,  4238,  4237,  4236
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*Elset, elset=_PickedSet2, internal
  236,  237,  238,  239,  240,  241
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** Section: Section-1
*Solid Section, elset=_PickedSet2, material=teaa
,
*End Part
**
**
** ASSEMBLY
**
*Assembly, name=Assembly
**
*Instance, name=PART-1-1, part=PART-1
*End Instance
**
*Nset, nset=Set-1, instance=PART-1-1
 12240,
*Nset, nset=Set-2, instance=PART-1-1
 12242,
*Nset, nset=Set-3, instance=PART-1-1
 12244,
*Nset, nset=Set-4, instance=PART-1-1
 10181,
*Nset, nset=Set-5, instance=PART-1-1
 12241,
*Nset, nset=Set-6, instance=PART-1-1
 12243,
*Nset, nset=Set-7, instance=PART-1-1
 12245,
*Nset, nset=Set-8, instance=PART-1-1
 10182,
*Nset, nset=Set-9, instance=PART-1-1
 12235,
*Nset, nset=Set-10, instance=PART-1-1
 12237,
*Nset, nset=Set-11, instance=PART-1-1
 12239,
*Nset, nset=Set-12, instance=PART-1-1
 10183,
*Nset, nset=Set-13, instance=PART-1-1
 12234,
*Nset, nset=Set-14, instance=PART-1-1
 12236,
*Nset, nset=Set-15, instance=PART-1-1
 12238,
*Nset, nset=Set-16, instance=PART-1-1
 10184,
*Nset, nset=Set-17, instance=PART-1-1
 7147,
*Nset, nset=Set-18, instance=PART-1-1
 7145,
*Nset, nset=Set-19, instance=PART-1-1
 7143,
*Nset, nset=Set-20, instance=PART-1-1
 6622,
*Nset, nset=Set-21, instance=PART-1-1
 7146,
*Nset, nset=Set-22, instance=PART-1-1
 7144,
*Nset, nset=Set-23, instance=PART-1-1
 7142,
*Nset, nset=Set-24, instance=PART-1-1
 6623,
*Nset, nset=Set-25, instance=PART-1-1
 7140,
*Nset, nset=Set-26, instance=PART-1-1
 7138,
*Nset, nset=Set-27, instance=PART-1-1
 7136,
*Nset, nset=Set-28, instance=PART-1-1
 6624,
*Nset, nset=Set-29, instance=PART-1-1
 7141,
*Nset, nset=Set-30, instance=PART-1-1
 7139,
*Nset, nset=Set-31, instance=PART-1-1
 7137,
*Nset, nset=Set-32, instance=PART-1-1
 6625,
*Nset, nset=Set-33, instance=PART-1-1
 10358,
*Nset, nset=Set-34, instance=PART-1-1
 10362,
*Nset, nset=Set-35, instance=PART-1-1
 10366,
*Nset, nset=Set-36, instance=PART-1-1
 11315,
*Nset, nset=Set-37, instance=PART-1-1
 10357,
*Nset, nset=Set-38, instance=PART-1-1
 10361,
*Nset, nset=Set-39, instance=PART-1-1
 10365,
*Nset, nset=Set-40, instance=PART-1-1
 11314,
*Nset, nset=Set-41, instance=PART-1-1
 10346,
*Nset, nset=Set-42, instance=PART-1-1
 10347,
*Nset, nset=Set-43, instance=PART-1-1
 10348,
*Nset, nset=Set-44, instance=PART-1-1
 11313,
*Nset, nset=Set-45, instance=PART-1-1
 10343,
*Nset, nset=Set-46, instance=PART-1-1
 10344,
*Nset, nset=Set-47, instance=PART-1-1
 10345,
*Nset, nset=Set-48, instance=PART-1-1
 11312,
*Nset, nset=Set-49, instance=PART-1-1
 5187,
*Nset, nset=Set-50, instance=PART-1-1
 5186,
*Nset, nset=Set-51, instance=PART-1-1
 5185,
*Nset, nset=Set-52, instance=PART-1-1
 4218,
*Nset, nset=Set-53, instance=PART-1-1
 5184,
*Nset, nset=Set-54, instance=PART-1-1
 5183,
*Nset, nset=Set-55, instance=PART-1-1
 5182,
*Nset, nset=Set-56, instance=PART-1-1
 4217,
*Nset, nset=Set-57, instance=PART-1-1
 5173,
*Nset, nset=Set-58, instance=PART-1-1
 5169,
*Nset, nset=Set-59, instance=PART-1-1
 5165,
*Nset, nset=Set-60, instance=PART-1-1
 4216,
*Nset, nset=Set-61, instance=PART-1-1
 5172,
*Nset, nset=Set-62, instance=PART-1-1
 5168,
*Nset, nset=Set-63, instance=PART-1-1
 5164,
*Nset, nset=Set-64, instance=PART-1-1
 4215,
*Nset, nset=Set-65, instance=PART-1-1
 9455,
*Nset, nset=Set-66, instance=PART-1-1
 9454,
*Nset, nset=Set-67, instance=PART-1-1
 9462,
*Nset, nset=Set-68, instance=PART-1-1
 11231,
*Nset, nset=Set-69, instance=PART-1-1
 11230,
*Nset, nset=Set-70, instance=PART-1-1
 9451,
*Nset, nset=Set-71, instance=PART-1-1
 9450,
*Nset, nset=Set-72, instance=PART-1-1
 9460,
*Nset, nset=Set-73, instance=PART-1-1
 11235,
*Nset, nset=Set-74, instance=PART-1-1
 11234,
*Nset, nset=Set-75, instance=PART-1-1
 9447,
*Nset, nset=Set-76, instance=PART-1-1
 9446,
*Nset, nset=Set-77, instance=PART-1-1
 9458,
*Nset, nset=Set-78, instance=PART-1-1
 11239,
*Nset, nset=Set-79, instance=PART-1-1
 11238,
*Nset, nset=Set-80, instance=PART-1-1
 9097,
*Nset, nset=Set-81, instance=PART-1-1
 9096,
*Nset, nset=Set-82, instance=PART-1-1
 9095,
*Nset, nset=Set-83, instance=PART-1-1
 11589,
*Nset, nset=Set-84, instance=PART-1-1
 11588,
*Nset, nset=Set-85, instance=PART-1-1
 6075,
*Nset, nset=Set-86, instance=PART-1-1
 6076,
*Nset, nset=Set-87, instance=PART-1-1
 4247,
*Nset, nset=Set-88, instance=PART-1-1
 4239,
*Nset, nset=Set-89, instance=PART-1-1
 4240,
*Nset, nset=Set-90, instance=PART-1-1
 6079,
*Nset, nset=Set-91, instance=PART-1-1
 6080,
*Nset, nset=Set-92, instance=PART-1-1
 4245,
*Nset, nset=Set-93, instance=PART-1-1
 4235,
*Nset, nset=Set-94, instance=PART-1-1
 4236,
*Nset, nset=Set-95, instance=PART-1-1
 6083,
*Nset, nset=Set-96, instance=PART-1-1
 6084,
*Nset, nset=Set-97, instance=PART-1-1
 4243,
*Nset, nset=Set-98, instance=PART-1-1
 4231,
*Nset, nset=Set-99, instance=PART-1-1
 4232,
*Nset, nset=Set-100, instance=PART-1-1
 6433,
*Nset, nset=Set-101, instance=PART-1-1
 6434,
*Nset, nset=Set-102, instance=PART-1-1
 3940,
*Nset, nset=Set-103, instance=PART-1-1
 3941,
*Nset, nset=Set-104, instance=PART-1-1
 3942,
*Nset, nset=_PickedSet77, internal, instance=PART-1-1
 5172,
*Nset, nset=_PickedSet118, internal, instance=PART-1-1
 9455,
*Elset, elset=_Surf-2_S2, internal, instance=PART-1-1
  238,  241,  244,  247,  250,  253
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*Surface, type=ELEMENT, name=Surf-2
_Surf-2_S2, S2
*Nset, nset="_T-Datum csys-2", internal
_PickedSet77,
_PickedSet118,
Set-65,
Set-85,
Set-66,
Set-86,
Set-67,
Set-87,
Set-68,
Set-88,
Set-69,
Set-89,
Set-70,
Set-90,
Set-71,
Set-91,
Set-72,
Set-92,
Set-73,
Set-93,
Set-74,
Set-94,
Set-75,
Set-95,
Set-76,
Set-96,
Set-77,
Set-97,
Set-78,
Set-98,
Set-79,
Set-99,
Set-80,
Set-100,
Set-81,
Set-101,
Set-82,
Set-102,
Set-83,
Set-103,
Set-84,
Set-104,
Set-1,
Set-33,
Set-2,
Set-34,
Set-3,
Set-35,
Set-4,
Set-36,
Set-5,
Set-37,
Set-6,
Set-38,
Set-7,
Set-39,
Set-8,
Set-40,
Set-9,
Set-41,
Set-10,
Set-42,
Set-11,
Set-43,
Set-12,
Set-44,
Set-13,
Set-45,
Set-14,
Set-46,
Set-15,
Set-47,
Set-16,
Set-48,
Set-17,
Set-49,
Set-18,
Set-50,
Set-19,
Set-51,
Set-20,
Set-52,
Set-21,
Set-53,
Set-22,
Set-54,
Set-23,
Set-55,
Set-24,
Set-56,
Set-25,
Set-57,
Set-26,
Set-58,
Set-27,
Set-59,
Set-28,
Set-60,
Set-29,
Set-61,
Set-30,
Set-62,
Set-31,
Set-63,
Set-32,
Set-64,
*Transform, nset="_T-Datum csys-2", type=C
          0.,           0.,           0.,          -1.,           0.,           0.
** Constraint: Constraint-J-R-65
*Equation
2
Set-65, 1, 1.
Set-85, 1, -1.
** Constraint: Constraint-J-R-66
*Equation
2
Set-66, 1, 1.
Set-86, 1, -1.
** Constraint: Constraint-J-R-67
*Equation
2
Set-67, 1, 1.
Set-87, 1, -1.
** Constraint: Constraint-J-R-68
*Equation
2
Set-68, 1, 1.
Set-88, 1, -1.
** Constraint: Constraint-J-R-69
*Equation
2
Set-69, 1, 1.
Set-89, 1, -1.
** Constraint: Constraint-J-R-70
*Equation
2
Set-70, 1, 1.
Set-90, 1, -1.
** Constraint: Constraint-J-R-71
*Equation
2
Set-71, 1, 1.
Set-91, 1, -1.
** Constraint: Constraint-J-R-72
*Equation
2
Set-72, 1, 1.
Set-92, 1, -1.
** Constraint: Constraint-J-R-73
*Equation
2
Set-73, 1, 1.
Set-93, 1, -1.
** Constraint: Constraint-J-R-74
*Equation
2
Set-74, 1, 1.
Set-94, 1, -1.
** Constraint: Constraint-J-R-75
*Equation
2
Set-75, 1, 1.
Set-95, 1, -1.
** Constraint: Constraint-J-R-76
*Equation
2
Set-76, 1, 1.
Set-96, 1, -1.
** Constraint: Constraint-J-R-77
*Equation
2
Set-77, 1, 1.
Set-97, 1, -1.
** Constraint: Constraint-J-R-78
*Equation
2
Set-78, 1, 1.
Set-98, 1, -1.
** Constraint: Constraint-J-R-79
*Equation
2
Set-79, 1, 1.
Set-99, 1, -1.
** Constraint: Constraint-J-R-80
*Equation
2
Set-80, 1, 1.
Set-100, 1, -1.
** Constraint: Constraint-J-R-81
*Equation
2
Set-81, 1, 1.
Set-101, 1, -1.
** Constraint: Constraint-J-R-82
*Equation
2
Set-82, 1, 1.
Set-102, 1, -1.
** Constraint: Constraint-J-R-83
*Equation
2
Set-83, 1, 1.
Set-103, 1, -1.
** Constraint: Constraint-J-R-84
*Equation
2
Set-84, 1, 1.
Set-104, 1, -1.
** Constraint: Constraint-J-T-65
*Equation
2
Set-65, 2, 1.
Set-85, 2, -1.
** Constraint: Constraint-J-T-66
*Equation
2
Set-66, 2, 1.
Set-86, 2, -1.
** Constraint: Constraint-J-T-67
*Equation
2
Set-67, 2, 1.
Set-87, 2, -1.
** Constraint: Constraint-J-T-68
*Equation
2
Set-68, 2, 1.
Set-88, 2, -1.
** Constraint: Constraint-J-T-69
*Equation
2
Set-69, 2, 1.
Set-89, 2, -1.
** Constraint: Constraint-J-T-70
*Equation
2
Set-70, 2, 1.
Set-90, 2, -1.
** Constraint: Constraint-J-T-71
*Equation
2
Set-71, 2, 1.
Set-91, 2, -1.
** Constraint: Constraint-J-T-72
*Equation
2
Set-72, 2, 1.
Set-92, 2, -1.
** Constraint: Constraint-J-T-73
*Equation
2
Set-73, 2, 1.
Set-93, 2, -1.
** Constraint: Constraint-J-T-74
*Equation
2
Set-74, 2, 1.
Set-94, 2, -1.
** Constraint: Constraint-J-T-75
*Equation
2
Set-75, 2, 1.
Set-95, 2, -1.
** Constraint: Constraint-J-T-76
*Equation
2
Set-76, 2, 1.
Set-96, 2, -1.
** Constraint: Constraint-J-T-77
*Equation
2
Set-77, 2, 1.
Set-97, 2, -1.
** Constraint: Constraint-J-T-78
*Equation
2
Set-78, 2, 1.
Set-98, 2, -1.
** Constraint: Constraint-J-T-79
*Equation
2
Set-79, 2, 1.
Set-99, 2, -1.
** Constraint: Constraint-J-T-80
*Equation
2
Set-80, 2, 1.
Set-100, 2, -1.
** Constraint: Constraint-J-T-81
*Equation
2
Set-81, 2, 1.
Set-101, 2, -1.
** Constraint: Constraint-J-T-82
*Equation
2
Set-82, 2, 1.
Set-102, 2, -1.
** Constraint: Constraint-J-T-83
*Equation
2
Set-83, 2, 1.
Set-103, 2, -1.
** Constraint: Constraint-J-T-84
*Equation
2
Set-84, 2, 1.
Set-104, 2, -1.
** Constraint: Constraint-J-Z-66
*Equation
3
Set-86, 3, 1.
Set-66, 3, -1.
Set-85, 3, -1.
** Constraint: Constraint-J-Z-67
*Equation
3
Set-87, 3, 1.
Set-67, 3, -1.
Set-85, 3, -1.
** Constraint: Constraint-J-Z-68
*Equation
3
Set-88, 3, 1.
Set-68, 3, -1.
Set-85, 3, -1.
** Constraint: Constraint-J-Z-69
*Equation
3
Set-89, 3, 1.
Set-69, 3, -1.
Set-85, 3, -1.
** Constraint: Constraint-J-Z-70
*Equation
3
Set-90, 3, 1.
Set-70, 3, -1.
Set-85, 3, -1.
** Constraint: Constraint-J-Z-71
*Equation
3
Set-91, 3, 1.
Set-71, 3, -1.
Set-85, 3, -1.
** Constraint: Constraint-J-Z-72
*Equation
3
Set-92, 3, 1.
Set-72, 3, -1.
Set-85, 3, -1.
** Constraint: Constraint-J-Z-73
*Equation
3
Set-93, 3, 1.
Set-73, 3, -1.
Set-85, 3, -1.
** Constraint: Constraint-J-Z-74
*Equation
3
Set-94, 3, 1.
Set-74, 3, -1.
Set-85, 3, -1.
** Constraint: Constraint-J-Z-75
*Equation
3
Set-95, 3, 1.
Set-75, 3, -1.
Set-85, 3, -1.
** Constraint: Constraint-J-Z-76
*Equation
3
Set-96, 3, 1.
Set-76, 3, -1.
Set-85, 3, -1.
** Constraint: Constraint-J-Z-77
*Equation
3
Set-97, 3, 1.
Set-77, 3, -1.
Set-85, 3, -1.
** Constraint: Constraint-J-Z-78
*Equation
3
Set-98, 3, 1.
Set-78, 3, -1.
Set-85, 3, -1.
** Constraint: Constraint-J-Z-79
*Equation
3
Set-99, 3, 1.
Set-79, 3, -1.
Set-85, 3, -1.
** Constraint: Constraint-J-Z-80
*Equation
3
Set-100, 3, 1.
Set-80, 3, -1.
Set-85, 3, -1.
** Constraint: Constraint-J-Z-81
*Equation
3
Set-101, 3, 1.
Set-81, 3, -1.
Set-85, 3, -1.
** Constraint: Constraint-J-Z-82
*Equation
3
Set-102, 3, 1.
Set-82, 3, -1.
Set-85, 3, -1.
** Constraint: Constraint-J-Z-83
*Equation
3
Set-103, 3, 1.
Set-83, 3, -1.
Set-85, 3, -1.
** Constraint: Constraint-J-Z-84
*Equation
3
Set-104, 3, 1.
Set-84, 3, -1.
Set-85, 3, -1.
** Constraint: Constraint-K-R-1
*Equation
2
Set-1, 1, 1.
Set-33, 1, -1.
** Constraint: Constraint-K-R-2
*Equation
2
Set-2, 1, 1.
Set-34, 1, -1.
** Constraint: Constraint-K-R-3
*Equation
2
Set-3, 1, 1.
Set-35, 1, -1.
** Constraint: Constraint-K-R-4
*Equation
2
Set-4, 1, 1.
Set-36, 1, -1.
** Constraint: Constraint-K-R-5
*Equation
2
Set-5, 1, 1.
Set-37, 1, -1.
** Constraint: Constraint-K-R-6
*Equation
2
Set-6, 1, 1.
Set-38, 1, -1.
** Constraint: Constraint-K-R-7
*Equation
2
Set-7, 1, 1.
Set-39, 1, -1.
** Constraint: Constraint-K-R-8
*Equation
2
Set-8, 1, 1.
Set-40, 1, -1.
** Constraint: Constraint-K-R-9
*Equation
2
Set-9, 1, 1.
Set-41, 1, -1.
** Constraint: Constraint-K-R-10
*Equation
2
Set-10, 1, 1.
Set-42, 1, -1.
** Constraint: Constraint-K-R-11
*Equation
2
Set-11, 1, 1.
Set-43, 1, -1.
** Constraint: Constraint-K-R-12
*Equation
2
Set-12, 1, 1.
Set-44, 1, -1.
** Constraint: Constraint-K-R-13
*Equation
2
Set-13, 1, 1.
Set-45, 1, -1.
** Constraint: Constraint-K-R-14
*Equation
2
Set-14, 1, 1.
Set-46, 1, -1.
** Constraint: Constraint-K-R-15
*Equation
2
Set-15, 1, 1.
Set-47, 1, -1.
** Constraint: Constraint-K-R-16
*Equation
2
Set-16, 1, 1.
Set-48, 1, -1.
** Constraint: Constraint-K-R-17
*Equation
2
Set-17, 1, 1.
Set-49, 1, -1.
** Constraint: Constraint-K-R-18
*Equation
2
Set-18, 1, 1.
Set-50, 1, -1.
** Constraint: Constraint-K-R-19
*Equation
2
Set-19, 1, 1.
Set-51, 1, -1.
** Constraint: Constraint-K-R-20
*Equation
2
Set-20, 1, 1.
Set-52, 1, -1.
** Constraint: Constraint-K-R-21
*Equation
2
Set-21, 1, 1.
Set-53, 1, -1.
** Constraint: Constraint-K-R-22
*Equation
2
Set-22, 1, 1.
Set-54, 1, -1.
** Constraint: Constraint-K-R-23
*Equation
2
Set-23, 1, 1.
Set-55, 1, -1.
** Constraint: Constraint-K-R-24
*Equation
2
Set-24, 1, 1.
Set-56, 1, -1.
** Constraint: Constraint-K-R-25
*Equation
2
Set-25, 1, 1.
Set-57, 1, -1.
** Constraint: Constraint-K-R-26
*Equation
2
Set-26, 1, 1.
Set-58, 1, -1.
** Constraint: Constraint-K-R-27
*Equation
2
Set-27, 1, 1.
Set-59, 1, -1.
** Constraint: Constraint-K-R-28
*Equation
2
Set-28, 1, 1.
Set-60, 1, -1.
** Constraint: Constraint-K-R-29
*Equation
2
Set-29, 1, 1.
Set-61, 1, -1.
** Constraint: Constraint-K-R-30
*Equation
2
Set-30, 1, 1.
Set-62, 1, -1.
** Constraint: Constraint-K-R-31
*Equation
2
Set-31, 1, 1.
Set-63, 1, -1.
** Constraint: Constraint-K-R-32
*Equation
2
Set-32, 1, 1.
Set-64, 1, -1.
** Constraint: Constraint-K-T-1
*Equation
2
Set-1, 2, 1.
Set-33, 2, -1.
** Constraint: Constraint-K-T-2
*Equation
2
Set-2, 2, 1.
Set-34, 2, -1.
** Constraint: Constraint-K-T-3
*Equation
2
Set-3, 2, 1.
Set-35, 2, -1.
** Constraint: Constraint-K-T-4
*Equation
2
Set-4, 2, 1.
Set-36, 2, -1.
** Constraint: Constraint-K-T-5
*Equation
2
Set-5, 2, 1.
Set-37, 2, -1.
** Constraint: Constraint-K-T-6
*Equation
2
Set-6, 2, 1.
Set-38, 2, -1.
** Constraint: Constraint-K-T-7
*Equation
2
Set-7, 2, 1.
Set-39, 2, -1.
** Constraint: Constraint-K-T-8
*Equation
2
Set-8, 2, 1.
Set-40, 2, -1.
** Constraint: Constraint-K-T-9
*Equation
2
Set-9, 2, 1.
Set-41, 2, -1.
** Constraint: Constraint-K-T-10
*Equation
2
Set-10, 2, 1.
Set-42, 2, -1.
** Constraint: Constraint-K-T-11
*Equation
2
Set-11, 2, 1.
Set-43, 2, -1.
** Constraint: Constraint-K-T-12
*Equation
2
Set-12, 2, 1.
Set-44, 2, -1.
** Constraint: Constraint-K-T-13
*Equation
2
Set-13, 2, 1.
Set-45, 2, -1.
** Constraint: Constraint-K-T-14
*Equation
2
Set-14, 2, 1.
Set-46, 2, -1.
** Constraint: Constraint-K-T-15
*Equation
2
Set-15, 2, 1.
Set-47, 2, -1.
** Constraint: Constraint-K-T-16
*Equation
2
Set-16, 2, 1.
Set-48, 2, -1.
** Constraint: Constraint-K-T-17
*Equation
2
Set-17, 2, 1.
Set-49, 2, -1.
** Constraint: Constraint-K-T-18
*Equation
2
Set-18, 2, 1.
Set-50, 2, -1.
** Constraint: Constraint-K-T-19
*Equation
2
Set-19, 2, 1.
Set-51, 2, -1.
** Constraint: Constraint-K-T-20
*Equation
2
Set-20, 2, 1.
Set-52, 2, -1.
** Constraint: Constraint-K-T-21
*Equation
2
Set-21, 2, 1.
Set-53, 2, -1.
** Constraint: Constraint-K-T-22
*Equation
2
Set-22, 2, 1.
Set-54, 2, -1.
** Constraint: Constraint-K-T-23
*Equation
2
Set-23, 2, 1.
Set-55, 2, -1.
** Constraint: Constraint-K-T-24
*Equation
2
Set-24, 2, 1.
Set-56, 2, -1.
** Constraint: Constraint-K-T-25
*Equation
2
Set-25, 2, 1.
Set-57, 2, -1.
** Constraint: Constraint-K-T-26
*Equation
2
Set-26, 2, 1.
Set-58, 2, -1.
** Constraint: Constraint-K-T-27
*Equation
2
Set-27, 2, 1.
Set-59, 2, -1.
** Constraint: Constraint-K-T-28
*Equation
2
Set-28, 2, 1.
Set-60, 2, -1.
** Constraint: Constraint-K-T-29
*Equation
2
Set-29, 2, 1.
Set-61, 2, -1.
** Constraint: Constraint-K-T-30
*Equation
2
Set-30, 2, 1.
Set-62, 2, -1.
** Constraint: Constraint-K-T-31
*Equation
2
Set-31, 2, 1.
Set-63, 2, -1.
** Constraint: Constraint-K-T-32
*Equation
2
Set-32, 2, 1.
Set-64, 2, -1.
** Constraint: Constraint-K-Z-1
*Equation
2
Set-1, 3, 1.
Set-33, 3, -1.
** Constraint: Constraint-K-Z-2
*Equation
2
Set-2, 3, 1.
Set-34, 3, -1.
** Constraint: Constraint-K-Z-3
*Equation
2
Set-3, 3, 1.
Set-35, 3, -1.
** Constraint: Constraint-K-Z-4
*Equation
2
Set-4, 3, 1.
Set-36, 3, -1.
** Constraint: Constraint-K-Z-5
*Equation
2
Set-5, 3, 1.
Set-37, 3, -1.
** Constraint: Constraint-K-Z-6
*Equation
2
Set-6, 3, 1.
Set-38, 3, -1.
** Constraint: Constraint-K-Z-7
*Equation
2
Set-7, 3, 1.
Set-39, 3, -1.
** Constraint: Constraint-K-Z-8
*Equation
2
Set-8, 3, 1.
Set-40, 3, -1.
** Constraint: Constraint-K-Z-9
*Equation
2
Set-9, 3, 1.
Set-41, 3, -1.
** Constraint: Constraint-K-Z-10
*Equation
2
Set-10, 3, 1.
Set-42, 3, -1.
** Constraint: Constraint-K-Z-11
*Equation
2
Set-11, 3, 1.
Set-43, 3, -1.
** Constraint: Constraint-K-Z-12
*Equation
2
Set-12, 3, 1.
Set-44, 3, -1.
** Constraint: Constraint-K-Z-13
*Equation
2
Set-13, 3, 1.
Set-45, 3, -1.
** Constraint: Constraint-K-Z-14
*Equation
2
Set-14, 3, 1.
Set-46, 3, -1.
** Constraint: Constraint-K-Z-15
*Equation
2
Set-15, 3, 1.
Set-47, 3, -1.
** Constraint: Constraint-K-Z-16
*Equation
2
Set-16, 3, 1.
Set-48, 3, -1.
** Constraint: Constraint-K-Z-17
*Equation
2
Set-17, 3, 1.
Set-49, 3, -1.
** Constraint: Constraint-K-Z-18
*Equation
2
Set-18, 3, 1.
Set-50, 3, -1.
** Constraint: Constraint-K-Z-19
*Equation
2
Set-19, 3, 1.
Set-51, 3, -1.
** Constraint: Constraint-K-Z-20
*Equation
2
Set-20, 3, 1.
Set-52, 3, -1.
** Constraint: Constraint-K-Z-21
*Equation
2
Set-21, 3, 1.
Set-53, 3, -1.
** Constraint: Constraint-K-Z-22
*Equation
2
Set-22, 3, 1.
Set-54, 3, -1.
** Constraint: Constraint-K-Z-23
*Equation
2
Set-23, 3, 1.
Set-55, 3, -1.
** Constraint: Constraint-K-Z-24
*Equation
2
Set-24, 3, 1.
Set-56, 3, -1.
** Constraint: Constraint-K-Z-25
*Equation
2
Set-25, 3, 1.
Set-57, 3, -1.
** Constraint: Constraint-K-Z-26
*Equation
2
Set-26, 3, 1.
Set-58, 3, -1.
** Constraint: Constraint-K-Z-27
*Equation
2
Set-27, 3, 1.
Set-59, 3, -1.
** Constraint: Constraint-K-Z-28
*Equation
2
Set-28, 3, 1.
Set-60, 3, -1.
** Constraint: Constraint-K-Z-29
*Equation
2
Set-29, 3, 1.
Set-61, 3, -1.
** Constraint: Constraint-K-Z-30
*Equation
2
Set-30, 3, 1.
Set-62, 3, -1.
** Constraint: Constraint-K-Z-31
*Equation
2
Set-31, 3, 1.
Set-63, 3, -1.
** Constraint: Constraint-K-Z-32
*Equation
2
Set-32, 3, 1.
Set-64, 3, -1.
*End Assembly
*Amplitude, name=Amp-2, time=TOTAL TIME
             0.,              0.,             0.5,              1.,              1.,              0.,             1.5,              1.
             2.,              0.,             2.5,              1.,              3.,              0.,             3.5,              1.
             4.,              0.,             4.5,              1.,              5.,              0.,             5.5,              1.
             6.,              0.,             6.5,              1.,              7.,              0.,             7.5,              1.
             8.,              0.,             8.5,              1.,              9.,              0.,             9.5,              1.
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            50.,              0.
**
** MATERIALS
**
*Material, name=teaa
*Depvar
     20,
*User Material, constants=14
30240.,   18000.,      0.3,      30.,  666.667, 0.262805,      20.,  2.84074
  2.84074,     0.03,      0.9,  1666.67,  2.09074,      40.
**
** BOUNDARY CONDITIONS
**
** Name: BC-4 Type: Displacement/Rotation
*Boundary
_PickedSet77, 2, 2
** Name: BC-5 Type: Displacement/Rotation
*Boundary
_PickedSet118, 3, 3
** ----------------------------------------------------------------
**
** STEP: Step000
**
*Step, name=Step000, nlgeom=NO, inc=10000
*Static
0.05, 1., 1e-05, 0.05
**
** LOADS
**
** Name: Load-1   Type: Pressure
*Dsload, amplitude=Amp-2
Surf-2, P, 0.25
**
** OUTPUT REQUESTS
**
*Restart, write, overlay, number interval=1, time marks=NO
**
** FIELD OUTPUT: F-Output-1
**
*Output, field
*Node Output
U,
*Element Output, directions=YES
E, S
**
** FIELD OUTPUT: F-Output-2
**
*Element Output, directions=YES
SDV,
**
** HISTORY OUTPUT: H-Output-1
**
*Output, history, variable=PRESELECT, frequency=99999
*End Step
